// COMSOL Multiphysics 6.0.0.354 model "Porous material.mph"
// Outline of the model tree

Parameters
  L = 5[m]  // Length
  H = 1[m]  // Height

Geometry
  geom1 "Geometry 1" (2D, length unit m)
    r1: Rectangle | base = center; size = {L, H}
    r2: Rectangle | pos = {-2.5, 0.5}; size = {L, 0.1}
    r3: Rectangle | pos = {-2.5, -0.6}; size = {L, 0.1}
    r4: Rectangle | pos = {-2.5, 0.6}; size = {L, 0.3}
    r5: Rectangle | pos = {-2.5, -0.9}; size = {L, 0.3}
    fin: Finalize "Form Union"

Materials
  mat1: Common "Water, liquid" on all domains
    def "Basic"
      thermalexpansioncoefficient = alpha_p(T)
      bulkviscosity = muB(T)
      dynamicviscosity = eta(T)
      ratioofspecificheat = gamma_w(T)
      electricconductivity = 5.5e-6[S/m]
      heatcapacity = Cp(T)
      density = rho(T)
      thermalconductivity = k(T)
      soundspeed = cs(T)
      eta: Piecewise
        arg = T
        pieces = 
          {273.15, 413.15, 1.3799566804-0.021224019151*T^1+1.3604562827E-4*T^2-4.6454090319E-7*T^3+8.9042735735E-10*T^4-9.0790692686E-13*T^5+3.8457331488E-16*T^6}
          {413.15, 553.75, 0.00401235783-2.10746715E-5*T^1+3.85772275E-8*T^2-2.39730284E-11*T^3}
        argunit = K
        fununit = Pa*s
      Cp: Piecewise | arg = T; pieces = {273.15, 553.75, 12010.1471-80.4072879*T^1+0.309866854*T^2-5.38186884E-4*T^3+3.62536437E-7*T^4}; argunit = K; fununit = J/(kg*K)
      rho: Piecewise
        arg = T
        smooth = contd1
        pieces = 
          {273.15, 293.15, 6.3092789034e-05*T^3-0.0603676398829*T^2+18.9229382407066*T-950.704055329848}
          {293.15, 373.15, 1.0335053319e-05*T^3-0.0133950656345*T^2+4.96928883266*T+432.257114008512}
        argunit = K
        fununit = kg/m^3
      k: Piecewise | arg = T; pieces = {273.15, 553.75, -0.869083936+0.00894880345*T^1-1.58366345E-5*T^2+7.97543259E-9*T^3}; argunit = K; fununit = W/(m*K)
      cs: Interpolation | table = {{273, 1403}, {278, 1427}, {283, 1447}, {293, 1481}, {303, 1507}, {313, 1526}, {323, 1541}, {333, 1552}, {343, 1555}, {353, 1555}, {363, 1550}, {373, 1543}}; interp = piecewisecubic; fununit = m/s; argunit = K
      an1: Analytic | funcname = alpha_p; expr = -1/rho(T)*d(rho(T),T); args = T; fununit = 1/K; argunit = K
      an2: Analytic | funcname = gamma_w; expr = 1+(T/Cp(T))*(alpha_p(T)*cs(T))^2; args = T; fununit = 1; argunit = K
      an3: Analytic | funcname = muB; expr = 2.79*eta(T); args = T; fununit = Pa*s; argunit = K
  pmat2: PorousMedia "Porous Material 2" on domains 2, 4
    def "Basic"
      density = 500
      dynamicviscosity = 0.001
    poro "Porous model"
      porosity = 1

Physics
  fp: FreeAndPorousMediaFlow on all domains
    dependent variable u = {u, v, w}
    fp1: FluidProperties (default)
    init1: init "Initial Values 1" (default)
    wallbc1: WallBC "Wall 1" (default)
    porous1: PorousMedium on domains 2, 4
      fluid1: FluidPorousMedium "Fluid 1" (default)
      pm1: PorousMatrixPorousMedium "Porous Matrix 1" (default)
        epsilon_p_mat = from_mat
        kappa_mat = userdef
        kappa = 1e-12[m^2]
    inl1: InletBoundary "Inlet 1" on boundaries 5 | BoundaryCondition = FullyDevelopedFlow; U0in = 0.005; Uavfdf = 0.005
    out1: OutletBoundary "Outlet 1" on boundaries 14
      BoundaryCondition = Pressure
      ComponentWise = VelocityFieldComponentWise
    inl2: InletBoundary "Inlet 2" on boundaries 2
      BoundaryCondition = FullyDevelopedFlow
      ComponentWise = NormalInflowVelocity
      U0in = 0.005
      u0 = {0, 0.005, 0}
      Uavfdf = 0.0005
    out2: OutletBoundary "Outlet 2" on boundaries 11
      BoundaryCondition = FullyDevelopedFlow
      ComponentWise = NormalOutflowVelocity
      U0out = 0.005
      u0 = {0, 0.000, 0}
      FullyDevelopedFlowOption = Uav
      Uavfdf = 0.0005

Mesh
  mesh1 "Mesh 1" (physics-controlled)
    size: MeshSizeDefault | table = cfd; hauto = 4

Studies
  std1 "Study 1"
    stat: Stationary

Solver configurations
  sol1 "Solution 1" (study std1)
    v1: Variables "Dependent Variables 1"
    s1: Stationary "Stationary Solver 1"
      fc1: FullyCoupled | linsolver = d1; initstep = 0.01; maxiter = 100
      d1: Direct "Direct, fluid flow variables (fp)" | linsolver = pardiso; pivotperturb = 1.0E-13

Datasets
  dset1: Solution | solution = sol1

Plots
  pg1: PlotGroup2D "Velocity (fp)" | data = dset1
    surf1: Surface | expr = fp.U
    arwl1: ArrowLine | expr = {u, v}
  pg2: PlotGroup2D "Pressure (fp)" | data = dset1
    con1: Contour | expr = p; levelrounding = off